# NUFEB simulation

atom_style	bio
atom_modify	map array sort 100 5.0e-7
boundary	pp pp ff
newton		off
processors  * * 1

comm_modify	vel yes
read_data_bio atom.in

group HET type 1
group EPS type 2

neighbor	5e-7 bin
neigh_modify	delay 0 one 5000

##############Define DEM Variables&Commands##############

pair_style  gran/hooke/history 1.e-4 NULL 1.e-5 NULL 0.0 1
pair_coeff  * *

timestep 10

fix 1 all nve/limit 1e-8
fix fv all viscous 1e-5

fix zw all wall/gran hooke/history 2000 NULL 500.0 NULL 1.5 0 zplane  0.0  1e-04

variable kanc equal 50

fix zwa all walladh v_kanc zplane  0.0  1e-04

##############Define IBm Variables##############

#variables used in fix eps_extract
variable EPSdens equal 30
variable EPSratio equal 1.3

#variables used in fix division
variable divDia equal 1.36e-6

#variables used in fix kinetics
variable diffT equal 1e-4
variable tol equal 1e-6
variable layer equal -1

#variables used in fix death
variable deadDia equal 9e-7


##############Define IBm Commands##############

fix k1 all kinetics 1 20 16 20 v_diffT v_layer niter 5000
fix kgm all kinetics/growth/monod epsdens 30
fix g1 all kinetics/diffusion v_tol nn nn nn dcflag 2 closedflag 0
fix d1 all divide 1 v_EPSdens v_divDia 64564
fix e1 HET eps_extract 100 v_EPSratio v_EPSdens 53453

##############Define IBm Computes##############

compute myNtypes all ntypes
compute myHeight all avg_height
compute myRough all roughness
compute myMass all biomass
compute myCon all avg_con

##############Simulation Output##############

dump		id all custom 100 output.lammps id type diameter x y z
dump		du1 all vtk 100 atom_*.vtu id type diameter x y z
dump		du2 all grid 100 grid_%_*.vti con
dump            du3 all bio 100 avg_height roughness avg_con
thermo_style    custom step cpu atoms c_myNtypes[2] c_myNtypes[3] c_myMass[*]
thermo		1
thermo_modify	lost ignore


run 1100
