# NUFEB simulation

atom_style	bio
atom_modify	map array sort 1000 5.0e-7
boundary	pp pp ff
newton		off
processors  * * 1

comm_modify	vel yes
read_data_bio atom_1.in

##############Define initial particle distribution##############

lattice sc 1e-6 origin 0 0 0
region reg block 0 1000 0 1000 0 100

group CYANO type 1
group ECW type 2

neighbor	5e-7 bin
neigh_modify	delay 0 one 5000

##############Define DEM Variables&Commands##############

pair_style  gran/hooke/history 1.e-4 NULL 1.e-5 NULL 0.0 1
pair_coeff  * *

timestep 10

fix 1 all nve/limit 1e-8
fix fv all viscous 1e-5

fix zw all wall/gran hooke/history 2000 NULL 500.0 NULL 1.5 0 zplane  0.0  1e-05

variable kanc equal 50

#fix zwa all walladh v_kanc zplane  0.0  1e-04

variable ke equal 5e+10
#fix j1 all epsadh 1 v_ke 1

##############Define IBm Variables##############

#variables used in fix eps_extract
variable EPSdens equal 30
variable EPSratio equal 1.3

#variables used in fix division
variable divDia1 equal 1.96e-6
variable divDia2 equal 1.04e-6

#variable used for sucrose export
variable sucRatio index 0.0 0.1 0.2 0.3 0.4 0.5 0.6 0.7 0.8 0.9 1.0

#variables used in fix kinetics
variable diffT equal 1e-4
variable tol equal 1e-13
variable etaHET equal 0.6
variable layer equal -1

#variables used in fix death
#variable deadDia equal 9e-7


##############Define IBm Commands##############

fix k1 all kinetics 100 50 50 5 v_diffT v_layer niter 1000000
fix kgm all kinetics/growth/monod sucexp ${sucRatio}#gflag 1
fix g1 all kinetics/diffusion v_tol pp pp nn #closedflag 1#kg dcflag 2
fix d1 CYANO divide 100 v_EPSdens v_divDia1 64564
fix d2 ECW divide 100 v_EPSdens v_divDia2 15384
#fix d2 all death 1 v_deadDia demflag 0


##############Define IBm Computes##############

compute myNtypes all ntypes
compute myMass all biomass
compute myCon all avg_con

##############Simulation Output##############

dump		id all custom 100 output.lammmps id type diameter x y z
dump		du2 all grid 100 grid_%_*.vti con
dump            du3 all bio 100 ntypes biomass avg_con
thermo_style    custom step cpu atoms c_myNtypes[2] c_myMass[2] c_myCon[4] c_myCon[5]
thermo		100
thermo_modify	lost ignore

variable i loop 2
shell mkdir Run_$i
shell cd Run_$i
run 40000
shell cd ..
clear
next i
next sucRatio
jump SELF
